<?xml version="1.0"?>
<?xml-stylesheet type="text/xsl" href="http://jsbsim.sourceforge.net/JSBSim.xsl"?>
<fdm_config name="B-600" version="2.0" release="ALPHA"
	xmlns:xsi="http://www.w3.org/2001/XMLSchema-instance"
	xsi:noNamespaceSchemaLocation="http://jsbsim.sourceforge.net/JSBSim.xsd">

	<fileheader>
		<author> Aeromatic v 0.96 </author>
		<filecreationdate>2018-11-28</filecreationdate>
		<version>$Revision: 1.20 $</version>
		<description> Models a B-600. </description>
	</fileheader>

 <metrics>
	 <wingarea  unit="M2">   4.08 </wingarea>
	 <wingspan  unit="M" >  6.45 </wingspan>
	 <wing_incidence unit="DEG"> 3.00 </wing_incidence>
	 <chord     unit="M" >    0.692 </chord>
	 <htailarea unit="M2">    0.499 </htailarea>
	 <htailarm  unit="M" >    1.622 </htailarm>
	 <vtailarea unit="M2">    0.173 </vtailarea>
	 <vtailarm  unit="M" >    1.742 </vtailarm>
	 <!-- Have only calculated from wing x_ac. x_ac_wing = 0.265%MAC -->
	 <location name="AERORP" unit="M">
		 <x>  0.21812 </x>
		 <y>   0.00 </y>
		 <z>   0.00 </z>
	 </location>
	 <location name="EYEPOINT" unit="IN">
		 <!-- Irrelevant? -->
		 <x>  15.36 </x>
		 <y> -18.00 </y>
		 <z>  45.00 </z>
	 </location>
	 <location name="VRP" unit="IN">
		 <!-- Define by datum -->
		 <x>0</x>
		 <y>0</y>
		 <z>0</z>
	 </location>
 </metrics>

 <mass_balance>
	 <!--
	 <ixx unit="KG*M2"> 52.88 </ixx>
	 <iyy unit="KG*M2"> 21.69 </iyy>
	 <izz unit="KG*M2"> 70.50 </izz>
	-->
<!-- Numbers from Planemaker Model-->
	 <ixx unit="KG*M2"> 67.24 </ixx>
	 <iyy unit="KG*M2"> 50.24 </iyy>
     <izz unit="KG*M2"> 114.49 </izz>
     <!-- Measured on 2019-05-22 -->
	 <emptywt unit="KG" >  98.4 </emptywt>
	 <location name="CG" unit="M">
         <!-- Flashing installed on 2019-05-22 to get CoG to spar position -->
		 <x>  0.20774 </x>
		 <y>   0.00 </y>
		 <z>  -0.0 </z>
		 <!--z>  -0.1825 </z-->
 </location>
 <pointmass name="Payload">
     <!-- 50kg total -->
	 <weight unit="KG"> 0 </weight>
	 <location name="POINTMASS" unit="M">
		 <x>  0.20774 </x>
		 <y>  0.00 </y>
		 <z> -0.1825 </z>
	 </location>
 </pointmass>
 </mass_balance>

 <ground_reactions>

     <!-- Temporary centre-front wheel -->
     <contact type="BOGEY" name="FORE">
         <location unit="M">
             <x>-0.359</x>
             <y>0</y>
             <z>-0.68</z>
         </location>
         <static_friction>  1.00 </static_friction>
         <dynamic_friction> 0.50 </dynamic_friction>
         <rolling_friction> 0.004 </rolling_friction>
         <spring_coeff unit="N/M"> 3678.75 </spring_coeff>
         <damping_coeff unit="N/M/SEC"> 1103.625 </damping_coeff>
         <max_steer unit="DEG">7</max_steer>
         <brake_group>NONE</brake_group>
         <retractable>0</retractable>
     </contact>

     <!-- ORIGINAL WHEEL PLACEMENT
	 <contact type="BOGEY" name="RIGHT_FORE">
		 <location unit="M">
			 <x> -0.285 </x>
			 <y> 0.831 </y>
			 <z> -0.681 </z>
		 </location>
		 <static_friction>  1.00 </static_friction>
		 <dynamic_friction> 0.50 </dynamic_friction>
		 <rolling_friction> 0.004 </rolling_friction>
		 <spring_coeff unit="N/M"> 3678.75 </spring_coeff>
		 <damping_coeff unit="N/M/SEC"> 1103.625 </damping_coeff>
		 <max_steer unit="DEG">7</max_steer>
		 <brake_group>NONE</brake_group>
		 <retractable>0</retractable>
	 </contact>

	 <contact type="BOGEY" name="LEFT_FORE">
		 <location unit="M">
			 <x>  -0.285 </x>
			 <y> -0.831 </y>
			 <z> -0.681 </z>
		 </location>
		 <static_friction>  1.00 </static_friction>
		 <dynamic_friction> 0.50 </dynamic_friction>
		 <rolling_friction> 0.004 </rolling_friction>
		 <spring_coeff unit="N/M"> 3678.75 </spring_coeff>
		 <damping_coeff unit="N/M/SEC"> 1103.625 </damping_coeff>
		 <max_steer unit="DEG">7</max_steer>
		 <brake_group>NONE</brake_group>
		 <retractable>0</retractable>
	 </contact>
    -->

	 <contact type="BOGEY" name="LEFT_AFT">
		 <location unit="M">
			 <x> 0.471 </x>
			 <y> -0.912</y>
			 <z> -0.684 </z>
		 </location>
		 <static_friction>  1.00 </static_friction>
		 <dynamic_friction> 0.50 </dynamic_friction>
		 <rolling_friction> 0.004 </rolling_friction>
		 <spring_coeff unit="N/M"> 7357.5 </spring_coeff>
		 <damping_coeff unit="N/M/SEC"> 2207.25 </damping_coeff>
		 <max_steer unit="DEG">0</max_steer>
		 <brake_group>LEFT</brake_group>
		 <retractable>0</retractable>
	 </contact>

	 <contact type="BOGEY" name="RIGHT_AFT">
		 <location unit="M">
			 <x> 0.471 </x>
			 <y> 0.912 </y>
			 <z> -0.684 </z>
		 </location>
		 <static_friction>  1.00 </static_friction>
		 <dynamic_friction> 0.50 </dynamic_friction>
		 <rolling_friction> 0.004 </rolling_friction>
		 <spring_coeff unit="N/M"> 7357.5 </spring_coeff>
		 <damping_coeff unit="N/M/SEC"> 2207.25 </damping_coeff>
		 <max_steer unit="DEG">0</max_steer>
		 <brake_group>RIGHT</brake_group>
		 <retractable>0</retractable>
	 </contact>

	 <!-- This is the forward most point of the nose, but should be the contact point, wherever that may be -->
	 <contact type="STRUCTURE" name="NOSE">
		 <location unit="M">
			 <x>  -0.815 </x>
			 <y>   0.00 </y>
			 <z> -0.206 </z>
		 </location>
		 <static_friction>  1.00 </static_friction>
		 <dynamic_friction> 1.00 </dynamic_friction>
		 <spring_coeff unit="LBS/FT">        100 </spring_coeff>
		 <damping_coeff unit="LBS/FT/SEC">   5 </damping_coeff>
	 </contact>

	 <contact type="STRUCTURE" name="LEFT_WING">
		 <location unit="M">
			 <x>  0.606 </x>
			 <y> -3.225 </y>
			 <z>  0.034 </z>
		 </location>
		 <static_friction>  1.00 </static_friction>
		 <dynamic_friction> 1.00 </dynamic_friction>
		 <spring_coeff unit="LBS/FT">        330.75 </spring_coeff>
		 <damping_coeff unit="LBS/FT/SEC">   330.75 </damping_coeff>
	 </contact>

	 <contact type="STRUCTURE" name="RIGHT_WING">
		 <location unit="M">
			 <x>  0.606 </x>
			 <y>  3.225 </y>
			 <z>  0.034 </z>
		 </location>
		 <static_friction>  1.00 </static_friction>
		 <dynamic_friction> 1.00 </dynamic_friction>
		 <spring_coeff unit="LBS/FT">        330.75 </spring_coeff>
		 <damping_coeff unit="LBS/FT/SEC">   330.75 </damping_coeff>
	 </contact>

	 <contact type="STRUCTURE" name="LEFT_TAIL">
		 <location unit="M">
			 <x> 2.110  </x>
			 <y> -0.834 </y>
			 <z>  0.035 </z>
		 </location>
		 <static_friction>  1.00 </static_friction>
		 <dynamic_friction> 1.00 </dynamic_friction>
		 <spring_coeff unit="LBS/FT">        330.75 </spring_coeff>
		 <damping_coeff unit="LBS/FT/SEC">   330.75 </damping_coeff>
	 </contact>

	 <contact type="STRUCTURE" name="RIGHT_TAIL">
		 <location unit="M">
			 <x> 2.110  </x>
			 <y> 0.834  </y>
			 <z>  0.035 </z>
		 </location>
		 <static_friction>  1.00 </static_friction>
		 <dynamic_friction> 1.00 </dynamic_friction>
		 <spring_coeff unit="LBS/FT">        330.75 </spring_coeff>
		 <damping_coeff unit="LBS/FT/SEC">   330.75 </damping_coeff>
	 </contact>

 </ground_reactions>

 <external_reactions>
	 <force name="kick" frame="BODY" unit="N">
		 <location unit="M">
			 <x> 0 </x>
			 <y> 0 </y>
			 <z> 0 </z>
		 </location>
		 <direction>
			 <x> 0 </x>
			 <y> 1 </y>
			 <z> 0 </z>
		 </direction>
	 </force>
 </external_reactions>

 <propulsion>

	 <engine file="DLElectric">
		 <location unit="M">
			 <x>  1.140 </x>
			 <y>   0.00 </y>
			 <z>   0.00 </z>
		 </location>
		 <orient unit="DEG">
			 <pitch> 0.00 </pitch>
			 <roll>  0.00 </roll>
			 <yaw>   0.00 </yaw>
		 </orient>
		 <feed>0</feed>
		 <thruster file="prop">
			 <sense> 1 </sense>
			 <location unit="IN">
				 <x>  1.140 </x>
				 <y>  0.00 </y>
				 <z>  0.00 </z>
			 </location>
			 <orient unit="DEG">
				 <pitch> 0.00 </pitch>
				 <roll>  0.00 </roll>
				 <yaw>   0.00 </yaw>
			 </orient>
		 </thruster>
	 </engine>

	 <tank type="FUEL">
		 <location unit="M">
			 <x>  0.20774 </x>
			 <y>   0.00 </y>
			 <z>   0.00 </z>
		 </location>
		 <capacity unit="N"> 196.2 </capacity>
		 <!-- Crashes at larger values than 100 (maybe in old version of JSBSim) -->
		 <contents unit="N"> 0 </contents>
	 </tank>

 </propulsion>

 <flight_control name="FCS: B-600">

	 <channel name="All">

		 <summer name="Pitch Trim Sum">
			 <input>fcs/elevator-cmd-norm</input>
			 <input>fcs/pitch-trim-cmd-norm</input>
			 <clipto>
				 <min> -1 </min>
				 <max>  1 </max>
			 </clipto>
		 </summer>

		 <aerosurface_scale name="Elevator Control">
			 <input>fcs/pitch-trim-sum</input>
			 <range>
				 <min> -0.35 </min>
				 <max>  0.35 </max>
			 </range>
			 <output>fcs/elevator-pos-rad</output>
		 </aerosurface_scale>

		 <aerosurface_scale name="elevator normalization">
			 <input>fcs/elevator-pos-rad</input>
			 <domain>
				 <min> -0.35 </min>
				 <max>  0.35 </max>
			 </domain>
			 <range>
				 <min> -1 </min>
				 <max>  1 </max>
			 </range>
			 <output>fcs/elevator-pos-norm</output>
		 </aerosurface_scale>


		 <summer name="Roll Trim Sum">
			 <input>fcs/aileron-cmd-norm</input>
			 <input>fcs/roll-trim-cmd-norm</input>
			 <clipto>
				 <min> -1 </min>
				 <max>  1 </max>
			 </clipto>
		 </summer>

		 <aerosurface_scale name="Left Aileron Control">
			 <input>fcs/roll-trim-sum</input>
			 <range>
				 <min> -0.35 </min>
				 <max>  0.35 </max>
			 </range>
			 <output>fcs/left-aileron-pos-rad</output>
		 </aerosurface_scale>

		 <aerosurface_scale name="Right Aileron Control">
			 <input>fcs/roll-trim-sum</input>
			 <range>
				 <min> -0.35 </min>
				 <max>  0.35 </max>
			 </range>
			 <output>fcs/right-aileron-pos-rad</output>
		 </aerosurface_scale>

		 <aerosurface_scale name="left aileron normalization">
			 <input>fcs/left-aileron-pos-rad</input>
			 <domain>
				 <min> -0.35 </min>
				 <max>  0.35 </max>
			 </domain>
			 <range>
				 <min> -1 </min>
				 <max>  1 </max>
			 </range>
			 <output>fcs/left-aileron-pos-norm</output>
		 </aerosurface_scale>

		 <aerosurface_scale name="right aileron normalization">
			 <input>fcs/right-aileron-pos-rad</input>
			 <domain>
				 <min> -0.35 </min>
				 <max>  0.35 </max>
			 </domain>
			 <range>
				 <min> -1 </min>
				 <max>  1 </max>
			 </range>
			 <output>fcs/right-aileron-pos-norm</output>
		 </aerosurface_scale>

		 <summer name="Rudder Command Sum">
			 <input>fcs/rudder-cmd-norm</input>
			 <input>fcs/yaw-trim-cmd-norm</input>
			 <clipto>
				 <min> -1 </min>
				 <max>  1 </max>
			 </clipto>
		 </summer>

		 <aerosurface_scale name="Rudder Control">
			 <input>fcs/rudder-command-sum</input>
			 <range>
				 <min> -0.35 </min>
				 <max>  0.35 </max>
			 </range>
			 <output>fcs/rudder-pos-rad</output>
		 </aerosurface_scale>

		 <aerosurface_scale name="rudder normalization">
			 <input>fcs/rudder-pos-rad</input>
			 <domain>
				 <min> -0.35 </min>
				 <max>  0.35 </max>
			 </domain>
			 <range>
				 <min> -1 </min>
				 <max>  1 </max>
			 </range>
			 <output>fcs/rudder-pos-norm</output>
		 </aerosurface_scale>
	 </channel>
 </flight_control>

 <aerodynamics>

	 <axis name="LIFT">

		 <function name="aero/force/Lift_alpha">
			 <description>Lift due to alpha</description>
			 <!-- Updated -->
			 <product>
				 <property>aero/qbar-psf</property>
				 <sum>
					 <product>
						 <property>metrics/Sw-sqft</property>
						 <table name="aero/force/CL_wing">
							 <description> Wing CLalpha from javafoil</description>
							 <independentVar lookup="row">aero/alpha-wing-rad</independentVar>
							 <tableData>
								 -0.34906585	-0.738
								 -0.347320521	-0.739
								 -0.315904595	-0.743
								 -0.284488668	-0.724
								 -0.253072742	-0.682
								 -0.221656815	-0.617
								 -0.190240888	-0.545
								 -0.158824962	-0.454
								 -0.127409035	-0.293
								 -0.095993109	-0.117
								 -0.064577182	0.065
								 -0.033161256	0.249
								 -0.001745329	0.432
								 0.029670597	0.612
								 0.061086524	0.792
								 0.09250245	0.966
								 0.123918377	1.131
								 0.155334303	1.274
								 0.18675023	1.389
								 0.218166156	1.47
								 0.249582083	1.501
								 0.28099801	1.485
								 0.312413936	1.426
								 0.343829863	1.333
								 0.34906585	1.315
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							 </tableData>
						 </table>
					 </product>
					 <product>
						 <property>metrics/Sh-sqft</property>
						 <table name="aero/force/CL_tail">
							 <independentVar lookup="row">
								 aero/alpha-rad
							 </independentVar>
							 <tableData>
								 -0.174532925	-0.816
								 -0.157079633	-0.752
								 -0.13962634	-0.681
								 -0.122173048	-0.605
								 -0.104719755	-0.523
								 -0.087266463	-0.439
								 -0.06981317	-0.353
								 -0.052359878	-0.266
								 -0.034906585	-0.178
								 -0.017453293	-0.089
								 0	0
								 0.017453293	0.089
								 0.034906585	0.178
								 0.052359878	0.266
								 0.06981317	0.353
								 0.087266463	0.439
								 0.104719755	0.523
								 0.122173048	0.605
								 0.13962634	0.681
								 0.157079633	0.752
								 0.174532925	0.816
								 0.191986218	0.87
								 0.20943951	0.911
								 0.226892803	0.934
								 0.244346095	0.942
								 0.261799388	0.938
								 0.27925268	0.927
								 0.296705973	0.91
								 0.314159265	0.89
								 0.331612558	0.867
								 0.34906585	0.84
							 </tableData>
						 </table>
					 </product>
				 </sum>
			 </product>
		 </function>

		 <function name="aero/force/Lift_elevator">
			 <description>Lift due to Elevator Deflection</description>
			 <!-- Updated -->
			 <product>
				 <property>aero/qbar-psf</property>
				 <property>metrics/Sw-sqft</property>
				 <property>fcs/elevator-pos-rad</property>
				 <value>0.312</value>
			 </product>
		 </function>

	 </axis>

	 <axis name="DRAG">

		 <function name="aero/force/Drag_basic">
			 <description>Drag at zero lift</description>
			 <!-- Updated -->
			 <product>
				 <!-- Can also sum in drag from tail -->
				 <property>aero/qbar-psf</property>
				 <property>metrics/Sw-sqft</property>
				 <sum>
					 <table>
						 <!-- Fuselage from CFD -->
						 <independentVar lookup="row">aero/alpha-rad</independentVar>
						 <tableData>
							 -0.087266463	0.041275294
							 -0.043633231	0.041659608
							 0	0.041890196
							 0.043633231	0.041352157
							 0.087266463	0.040737255
							 0.130899694	0.040122353
							 0.174532925	0.039584314
						 </tableData>
					 </table>
					 <table>
						 <!-- Wing -->
						 <independentVar lookup="row">aero/alpha-wing-rad</independentVar>
						 <tableData>
							 -0.174532925	0.02106
							 -0.157079633	0.01696
							 -0.13962634	0.01189
							 -0.122173048	0.0095
							 -0.104719755	0.0084
							 -0.087266463	0.00732
							 -0.06981317	0.00709
							 -0.052359878	0.00761
							 -0.034906585	0.00828
							 -0.017453293	0.01017
							 0	0.01284
							 0.017453293	0.01593
							 0.034906585	0.01993
							 0.052359878	0.02472
							 0.06981317	0.02951
							 0.087266463	0.03864
							 0.104719755	0.04588
							 0.122173048	0.05372
							 0.13962634	0.06222
							 0.157079633	0.07141
							 0.174532925	0.08044
							 0.191986218	0.08851
							 0.20943951	0.09586
							 0.226892803	0.10285
							 0.244346095	0.10942
							 0.261799388	0.11448
							 0.27925268	0.11924
							 0.296705973	0.12403
							 0.314159265	0.12916
							 0.331612558	0.1358
							 0.34906585	0.1443
						 </tableData>
					 </table>
				 </sum>
			 </product>
		 </function>
		 <!--
		 <function name="aero/force/Drag_induced">
			 <description>Induced drag</description>
			 <product>
				 <property>aero/qbar-psf</property>
				 <property>metrics/Sw-sqft</property>
				 <property>aero/cl-squared</property>
				 <value>0.04</value>
			 </product>
		 </function>
		 -->

		 <function name="aero/force/Drag_mach">
			 <description>Drag due to mach</description>
			 <product>
				 <property>aero/qbar-psf</property>
				 <property>metrics/Sw-sqft</property>
				 <table>
					 <independentVar lookup="row">velocities/mach</independentVar>
					 <tableData>
						 0.00      0.000
						 0.7      0.000
						 1.10      0.023
						 1.80      0.015
					 </tableData>
				 </table>
			 </product>
		 </function>

		 <function name="aero/force/Drag_beta">
			 <description>Drag due to sideslip</description>
			 <product>
				 <property>aero/qbar-psf</property>
				 <property>metrics/Sw-sqft</property>
				 <table>
					 <independentVar lookup="row">aero/beta-rad</independentVar>
					 <tableData>
						 -1.57    1.230
						 -0.26    0.050
						 0.00    0.000
						 0.26    0.050
						 1.57    1.230
					 </tableData>
				 </table>
			 </product>
		 </function>

		 <function name="aero/force/Drag_elevator">
			 <description>Drag due to Elevator Deflection</description>
			 <product>
				 <property>aero/qbar-psf</property>
				 <property>metrics/Sw-sqft</property>
				 <abs><property>fcs/elevator-pos-norm</property></abs>
				 <value>0.04</value>
			 </product>
		 </function>

	 </axis>

	 <axis name="SIDE">

		 <function name="aero/force/Side_beta">
			 <description>Side force due to beta</description>
			 <product>
				 <property>aero/qbar-psf</property>
				 <property>metrics/Sw-sqft</property>
				 <property>aero/beta-rad</property>
				 <value>-1</value>
			 </product>
		 </function>

	 </axis>

	 <axis name="ROLL">

		 <function name="aero/moment/Roll_beta">
			 <description>Roll moment due to beta</description>
			 <product>
				 <property>aero/qbar-psf</property>
				 <property>metrics/Sw-sqft</property>
				 <property>metrics/bw-ft</property>
				 <property>aero/beta-rad</property>
				 <value>-0.1</value>
			 </product>
		 </function>

		 <function name="aero/moment/Roll_damp">
			 <description>Roll moment due to roll rate</description>
			 <product>
				 <property>aero/qbar-psf</property>
				 <property>metrics/Sw-sqft</property>
				 <property>metrics/bw-ft</property>
				 <property>aero/bi2vel</property>
				 <property>velocities/p-aero-rad_sec</property>
				 <value>-0.4</value>
			 </product>
		 </function>

		 <function name="aero/moment/Roll_yaw">
			 <description>Roll moment due to yaw rate</description>
			 <product>
				 <property>aero/qbar-psf</property>
				 <property>metrics/Sw-sqft</property>
				 <property>metrics/bw-ft</property>
				 <property>aero/bi2vel</property>
				 <property>velocities/r-aero-rad_sec</property>
				 <value>0.15</value>
			 </product>
		 </function>

		 <function name="aero/moment/Roll_aileron">
			 <description>Roll moment due to aileron</description>
			 <product>
				 <!-- Updated -->
				 <property>aero/qbar-psf</property>
				 <property>metrics/Sw-sqft</property>
				 <property>metrics/bw-ft</property>
				 <property>fcs/left-aileron-pos-rad</property>
				 <value>0.27</value>
			 </product>
		 </function>

		 <function name="aero/moment/Roll_rudder">
			 <description>Roll moment due to rudder</description>
			 <product>
				 <property>aero/qbar-psf</property>
				 <property>metrics/Sw-sqft</property>
				 <property>metrics/bw-ft</property>
				 <property>fcs/rudder-pos-rad</property>
				 <value>0.01</value>
			 </product>
		 </function>

	 </axis>

	 <axis name="PITCH">

		 <function name="aero/moment/Pitch_alpha">
			 <description>Pitch moment due to alpha</description>
			 <product>
				 <property>aero/qbar-psf</property>
				 <property>metrics/Sw-sqft</property>
				 <property>metrics/cbarw-ft</property>
				 <property>aero/alpha-rad</property>
				 <!-- Updated from wingspec -->
				 <table>
					 <independentVar lookup="row">aero/alpha-rad</independentVar>
					 <tableData>
						 -0.174532925	-0.059
						 -0.13962634	-0.061
						 -0.104719755	-0.064
						 -0.06981317	-0.066
						 -0.034906585	-0.068
						 0	-0.071
						 0.034906585	-0.073
						 0.06981317	-0.076
						 0.104719755	-0.079
						 0.13962634	-0.081
						 0.174532925	-0.083
						 0.20943951	-0.085
						 0.244346095	-0.086
						 0.27925268	-0.087
						 0.314159265	-0.087
						 0.34906585	-0.086
					 </tableData>
				 </table>

			 </product>
		 </function>

		 <function name="aero/moment/Pitch_elevator">
			 <description>Pitch moment due to elevator</description>
			 <!-- Updated -->
			 <product>
				 <property>aero/qbar-psf</property>
				 <property>metrics/Sw-sqft</property>
				 <property>metrics/cbarw-ft</property>
				 <property>fcs/elevator-pos-rad</property>
				 <!--
				 <table>
					 <independentVar lookup="row">velocities/mach</independentVar>
					 <tableData>
						 0.0     -1.100
						 2.0     -0.275
					 </tableData>
				 </table>
				-->
				 <value>-0.143</value> <!-- - V_H * eta * tau -->
				 <!-- <property>aero/force/CLalpha_tail</property> -->
				 <value>5.1</value> <!-- CLalpha_tail approximation -->
			 </product>
		 </function>

		 <function name="aero/moment/Pitch_damp">
			 <description>Pitch moment due to pitch rate</description>
			 <product>
				 <property>aero/qbar-psf</property>
				 <property>metrics/Sw-sqft</property>
				 <property>metrics/cbarw-ft</property>
				 <property>aero/ci2vel</property>
				 <property>velocities/q-aero-rad_sec</property>
				 <value>-12</value>
			 </product>
		 </function>

		 <function name="aero/moment/Pitch_alphadot">
			 <description>Pitch moment due to alpha rate</description>
			 <product>
				 <property>aero/qbar-psf</property>
				 <property>metrics/Sw-sqft</property>
				 <property>metrics/cbarw-ft</property>
				 <property>aero/ci2vel</property>
				 <property>aero/alphadot-rad_sec</property>
				 <value>-7</value>
			 </product>
		 </function>

	 </axis>

	 <axis name="YAW">

		 <function name="aero/moment/Yaw_beta">
			 <description>Yaw moment due to beta</description>
			 <product>
				 <property>aero/qbar-psf</property>
				 <property>metrics/Sw-sqft</property>
				 <property>metrics/bw-ft</property>
				 <property>aero/beta-rad</property>
				 <value>0.12</value>
			 </product>
		 </function>

		 <function name="aero/moment/Yaw_damp">
			 <description>Yaw moment due to yaw rate</description>
			 <product>
				 <property>aero/qbar-psf</property>
				 <property>metrics/Sw-sqft</property>
				 <property>metrics/bw-ft</property>
				 <property>aero/bi2vel</property>
				 <property>velocities/r-aero-rad_sec</property>
				 <value>-0.15</value>
			 </product>
		 </function>

		 <function name="aero/moment/Yaw_rudder">
			 <description>Yaw moment due to rudder</description>
			 <!-- Updated -->
			 <product>
				 <property>aero/qbar-psf</property>
				 <property>metrics/Sw-sqft</property>
				 <property>metrics/bw-ft</property>
				 <property>fcs/rudder-pos-rad</property>
				 <value>-0.277</value>
			 </product>
		 </function>

		 <function name="aero/moment/Yaw_aileron">
			 <description>Adverse yaw</description>
			 <product>
				 <property>aero/qbar-psf</property>
				 <property>metrics/Sw-sqft</property>
				 <property>metrics/bw-ft</property>
				 <property>fcs/left-aileron-pos-rad</property>
				 <value>-0.01</value>
			 </product>
		 </function>

	 </axis>

 </aerodynamics>

 <!-- Visualiser Output -->
 <output name="192.168.0.17" type="FLIGHTGEAR" port="7127" protocol="UDP" rate="200"/>
 <!-- <output name="localhost" type="FLIGHTGEAR" port="7127" protocol="UDP" rate="200"/> -->
 <!-- Telnet Interface -->
 <!-- <input port="1137"/> -->
</fdm_config>
